# OpenSim document version 40000
Model H0918M:
  gravity: 0 -9.80665 0
  length_units: meters
  force_units: N
  credits:
    Planar model with 9 degrees-of-freedom and 18 muscles. Adapted for SCONE from Gait2392 by Thomas Geijtenbeek.
  publications:
    Geijtenbeek, T.: SCONE: Open Source Software for Biological Motion, Journal of Open Source Software 4(38), 2019. Delp, S.L., Loan, J.P., Hoy, M.G., Zajac, F.E., Topp E.L., Rosen, J.M.: An interactive graphics-based model of the lower extremity to study orthopaedic surgical procedures, IEEE Transactions on Biomedical Engineering, vol. 37, pp. 757-767, 1990. Yamaguchi G.T., Zajac F.E.: A planar model of the knee joint to characterize the knee extensor mechanism." J . Biomech. vol. 22. pp. 1-10. 1989. Anderson F.C., Pandy M.G.: A dynamic optimization solution for vertical jumping in three dimensions. Computer Methods in Biomechanics and Biomedical Engineering 2:201-231, 1999. Anderson F.C., Pandy M.G.: Dynamic optimization of human walking. Journal of Biomechanical Engineering 123:381-390, 2001.
  IMU: socket_frame=/bodyset/IMU_mount
  Ground
  BodySet:
    Body pelvis: mass=11.777 [kg] mass_center=(-0.0707 0 0) inertia=(0.1028 0.0871 0.0579 0 0 0)
        meshes=(sacrum.vtp pelvis.vtp l_pelvis.vtp)
    Body femur_r: mass=9.3014 mass_center=(0 -0.17 0) inertia=(0.1339 0.0351 0.1412 0 0 0) meshes=r_femur.vtp
    Body tibia_r: mass=3.7075 mass_center=(0 -0.1867 0) inertia=(0.0504 0.0051 0.0511 0 0 0)
        meshes=(r_tibia.vtp r_fibula.vtp)
    Body calcn_r: mass=1.25 mass_center=(0.1 0.03 0) inertia=(0.0014 0.0039 0.0041 0 0 0)
        meshes=(talus.vtp bofoot.vtp foot.vtp)
    Body femur_l: mass=9.3014 mass_center=(0 -0.17 0) inertia=(0.1339 0.0351 0.1412 0 0 0) meshes=l_femur.vtp
    Body tibia_l: mass=3.7075 mass_center=(0 -0.1867 0) inertia=(0.0504 0.0051 0.0511 0 0 0)
        meshes=(l_tibia.vtp l_fibula.vtp)
    Body calcn_l: mass=1.25 mass_center=(0.1 0.03 0) inertia=(0.0014 0.0039 0.0041 0 0 0)
        meshes=(l_talus.vtp l_bofoot.vtp l_foot.vtp)
    Body torso: mass=34.2366 mass_center=(-0.03 0.32 0) inertia=(1.4745 0.7555 1.4314 0 0 0)
        meshes=(hat_spine.vtp hat_jaw.vtp hat_skull.vtp hat_ribs.vtp)
    Body Marker_LASI: mass=0 mass_center=(0 0 0) inertia=(1 1 1 0 0 0)
      Sphere Marker_LASI_geom_1: scale_factors=(1 1 1) radius=0.03
    Body Marker_RASI: mass=0 mass_center=(0 0 0) inertia=(1 1 1 0 0 0)
      Sphere Marker_RASI_geom_1: radius=0.03
    Body Marker_SACR: mass=0 mass_center=(0 0 0) inertia=(1 1 1 0 0 0)
      Sphere Marker_SACR_geom_1: radius=0.03
    Body Marker_LGTR: mass=0 mass_center=(0 0 0) inertia=(1 1 1 0 0 0)
      Sphere Marker_LGTR_geom_1: radius=0.03
    Body Marker_RGTR: mass=0 mass_center=(0 0 0) inertia=(1 1 1 0 0 0)
      Sphere Marker_RGTR_geom_1: radius=0.03
    Body Marker_LAC: mass=0 mass_center=(0 0 0) inertia=(1 1 1 0 0 0)
      Sphere Marker_LAC_geom_1: radius=0.03
    Body Marker_RAC: mass=0 mass_center=(0 0 0) inertia=(1 1 1 0 0 0)
      Sphere Marker_RAC_geom_1: radius=0.03
    Body IMU_mount: mass=0 mass_center=(0 0 0) inertia=(1 1 1 0 0 0)
      Brick IMU_mount_geom_1: half_lengths=(0.01000001 0.01000001 0.05000001)
  JointSet:
    CustomJoint ground_pelvis: socket_parent_frame=ground_offset socket_child_frame=pelvis_offset
      Coordinate pelvis_tilt: default_value=-0.6108652 range=(-1.570796 1.570796) clamped=false
      Coordinate pelvis_tx: default_value=0 range=(-5 5) clamped=false
      Coordinate pelvis_ty: default_value=0.75 range=(-1 2) clamped=false
      PhysicalOffsetFrame ground_offset: socket_parent=/ground translation=(0 0 0) [meters]
      PhysicalOffsetFrame pelvis_offset: socket_parent=/bodyset/pelvis translation=(0 0 0)
      SpatialTransform: axes_held_at_zero=(rotation2 rotation3 translation3)
        TransformAxis rotation1: coordinates=pelvis_tilt axis=(0 0 1) LinearFunction(coefficients=1 0)
        TransformAxis translation1: coordinates=pelvis_tx axis=(1 0 0) LinearFunction(coefficients=1 0)
        TransformAxis translation2: coordinates=pelvis_ty axis=(0 1 0) LinearFunction(coefficients=1 0)
    PinJoint hip_r: socket_parent_frame=pelvis_offset socket_child_frame=femur_r_offset
      Coordinate hip_flexion_r: default_value=1.396263 range=(-2.094395 2.094395) clamped=false
      PhysicalOffsetFrame pelvis_offset: socket_parent=/bodyset/pelvis translation=(-0.0707 -0.0661 0.0835)
      PhysicalOffsetFrame femur_r_offset: socket_parent=/bodyset/femur_r translation=(0 0 0)
    PinJoint knee_r: socket_parent_frame=femur_r_offset socket_child_frame=tibia_r_offset
      Coordinate knee_angle_r: default_value=-1.22173 range=(-2.094395 0.1745329) clamped=false
      PhysicalOffsetFrame femur_r_offset: socket_parent=/bodyset/femur_r translation=(0 -0.396 0)
      PhysicalOffsetFrame tibia_r_offset: socket_parent=/bodyset/tibia_r translation=(0 0 0)
    PinJoint ankle_r: socket_parent_frame=tibia_r_offset socket_child_frame=calcn_r_offset
      Coordinate ankle_angle_r: default_value=0.4363323 range=(-1.047198 1.047198) clamped=false
      PhysicalOffsetFrame tibia_r_offset: socket_parent=/bodyset/tibia_r translation=(0 -0.43 0)
      PhysicalOffsetFrame calcn_r_offset: socket_parent=/bodyset/calcn_r translation=(0.04877 0.04195 -0.00792)
    PinJoint hip_l: socket_parent_frame=pelvis_offset socket_child_frame=femur_l_offset
      Coordinate hip_flexion_l: default_value=1.396263 range=(-2.094395 2.094395) clamped=false
      PhysicalOffsetFrame pelvis_offset: socket_parent=/bodyset/pelvis translation=(-0.0707 -0.0661 -0.0835)
      PhysicalOffsetFrame femur_l_offset: socket_parent=/bodyset/femur_l translation=(0 0 0)
    PinJoint knee_l: socket_parent_frame=femur_l_offset socket_child_frame=tibia_l_offset
      Coordinate knee_angle_l: default_value=-1.22173 range=(-2.094395 0.1745329) clamped=false
      PhysicalOffsetFrame femur_l_offset: socket_parent=/bodyset/femur_l translation=(0 -0.396 0)
      PhysicalOffsetFrame tibia_l_offset: socket_parent=/bodyset/tibia_l translation=(0 0 0)
    PinJoint ankle_l: socket_parent_frame=tibia_l_offset socket_child_frame=calcn_l_offset
      Coordinate ankle_angle_l: default_value=0.4363323 range=(-1.047198 1.047198) clamped=false
      PhysicalOffsetFrame tibia_l_offset: socket_parent=/bodyset/tibia_l translation=(0 -0.43 0)
      PhysicalOffsetFrame calcn_l_offset: socket_parent=/bodyset/calcn_l translation=(0.04877 0.04195 0.00792)
    WeldJoint back: socket_parent_frame=pelvis_offset socket_child_frame=torso_offset
      PhysicalOffsetFrame pelvis_offset: socket_parent=/bodyset/pelvis translation=(-0.1007 0.0815 0)
      PhysicalOffsetFrame torso_offset: socket_parent=/bodyset/torso translation=(0 0 0)
    WeldJoint LASI2pelvis: socket_parent_frame=pelvis_offset socket_child_frame=Marker_LASI_offset
      PhysicalOffsetFrame pelvis_offset: socket_parent=/bodyset/pelvis
      PhysicalOffsetFrame Marker_LASI_offset: socket_parent=/bodyset/Marker_LASI translation=(-0.02 -0.06 0.13)
    WeldJoint RASI2pelvis: socket_parent_frame=pelvis_offset socket_child_frame=Marker_RASI_offset
      PhysicalOffsetFrame pelvis_offset: socket_parent=/bodyset/pelvis
      PhysicalOffsetFrame Marker_RASI_offset: socket_parent=/bodyset/Marker_RASI translation=(-0.02 -0.06000001 -0.13)
    WeldJoint SACR2pelvis: socket_parent_frame=pelvis_offset socket_child_frame=Marker_SACR_offset
      PhysicalOffsetFrame pelvis_offset: socket_parent=/bodyset/pelvis
      PhysicalOffsetFrame Marker_SACR_offset: socket_parent=/bodyset/Marker_SACR translation=(0.21 0.04 0)
    WeldJoint LGTR2femur: socket_parent_frame=femur_l_offset socket_child_frame=Marker_LGTR_offset
      PhysicalOffsetFrame femur_l_offset: socket_parent=/bodyset/femur_l
      PhysicalOffsetFrame Marker_LGTR_offset: socket_parent=/bodyset/Marker_LGTR translation=(0.02 0.03 0.11)
    WeldJoint RGTR2femur: socket_parent_frame=femur_r_offset socket_child_frame=Marker_RGTR_offset
      PhysicalOffsetFrame femur_r_offset: socket_parent=/bodyset/femur_r
      PhysicalOffsetFrame Marker_RGTR_offset: socket_parent=/bodyset/Marker_RGTR translation=(0.02 0.03 -0.11)
    WeldJoint LAC2torso: socket_parent_frame=torso_offset socket_child_frame=Marker_LAC_offset
      PhysicalOffsetFrame torso_offset: socket_parent=/bodyset/torso
      PhysicalOffsetFrame Marker_LAC_offset: socket_parent=/bodyset/Marker_LAC translation=(0.05 -0.45 0.15)
    WeldJoint RAC2torso: socket_parent_frame=torso_offset socket_child_frame=Marker_RAC_offset
      PhysicalOffsetFrame torso_offset: socket_parent=/bodyset/torso
      PhysicalOffsetFrame Marker_RAC_offset: socket_parent=/bodyset/Marker_RAC translation=(0.05 -0.45 -0.15)
    WeldJoint imuMount2torso: socket_parent_frame=torso_offset socket_child_frame=IMU_mount_offset
      PhysicalOffsetFrame torso_offset: socket_parent=/bodyset/torso
      PhysicalOffsetFrame IMU_mount_offset: socket_parent=/bodyset/IMU_mount translation=(0.05999999 -0.08999999 0)
  ForceSet:
    Millard2012EquilibriumMuscle [values shared by the 18 below unless stated]: optimal_force=1
        max_contraction_velocity=10 minimum_activation=0.01
      ActiveForceLengthCurve: minimum_value=0
      ForceVelocityCurve: concentric_slope_at_vmax=0 concentric_slope_near_vmax=0.25 isometric_slope=5
          eccentric_slope_at_vmax=0 eccentric_slope_near_vmax=0.15 max_eccentric_velocity_force_multiplier=1.4
      FiberForceLengthCurve
      TendonForceLengthCurve
    Millard2012EquilibriumMuscle hamstrings_r: max_isometric_force=2594 optimal_fiber_length=0.109
        tendon_slack_length=0.31 pennation_angle_at_optimal=0 [radians]
      PathPoint bifemlh_r-P1: pelvis (-0.12596 -0.10257 0.06944)
      PathPoint bifemlh_r-P2: tibia_r (-0.028 -0.02 0.02943)
      PathPoint bifemlh_r-P3: tibia_r (-0.021 -0.04 0.0343)
    Millard2012EquilibriumMuscle bifemsh_r: max_isometric_force=804 optimal_fiber_length=0.173
        tendon_slack_length=0.071 pennation_angle_at_optimal=0.4014257
      PathPoint P1: femur_r (0.005 -0.2111 0.0234)
      PathPoint P2: tibia_r (-0.028 -0.02 0.02943)
      PathPoint P3: tibia_r (-0.021 -0.04 0.0343)
    Millard2012EquilibriumMuscle glut_max_r: max_isometric_force=1944 optimal_fiber_length=0.147
        tendon_slack_length=0.127 pennation_angle_at_optimal=0
      PathPoint glut_max2_r-P1: pelvis (-0.1349 0.0176 0.0563)
      PathPoint glut_max2_r-P2: pelvis (-0.1376 -0.052 0.0914)
      PathPoint glut_max2_r-P3: femur_r (-0.0426 -0.053 0.0293)
      PathPoint glut_max2_r-P4: femur_r (-0.0156 -0.1016 0.0419)
    Millard2012EquilibriumMuscle iliopsoas_r: max_isometric_force=2342 optimal_fiber_length=0.1
        tendon_slack_length=0.163 pennation_angle_at_optimal=0.1396263
      PathPoint psoas_r-P1: pelvis (-0.0647 0.0887 0.0289)
      PathPoint psoas_r-P2: pelvis (-0.03 -0.01 0.076)
      PathPoint psoas_r-P4: femur_r (0.033 -0.035 0.0038)
      PathPoint psoas_r-P5: femur_r (-0.0188 -0.0597 0.0104)
    Millard2012EquilibriumMuscle rect_fem_r: max_isometric_force=1169 optimal_fiber_length=0.114
        tendon_slack_length=0.305 pennation_angle_at_optimal=0.08726646
      PathPoint P1: pelvis (-0.0295 -0.0311 0.0968)
      PathPoint P2: tibia_r (0.04 0.025 0.0018)
    Millard2012EquilibriumMuscle vasti_r: max_isometric_force=4530 optimal_fiber_length=0.087 tendon_slack_length=0.136
        pennation_angle_at_optimal=0.05235988
      PathPoint vas_int_r-P1: femur_r (0.029 -0.1924 0.031)
      PathPoint vas_int_r-P2: femur_r (0.0335 -0.2084 0.0285)
      PathPoint default: tibia_r (0.04 0.025 0.0018)
    Millard2012EquilibriumMuscle gastroc_r: max_isometric_force=2241 optimal_fiber_length=0.06 tendon_slack_length=0.39
        pennation_angle_at_optimal=0.296706
      PathPoint med_gas_r-P1: femur_r (-0.02 -0.386 -0.024)
      PathPoint med_gas_r-P3: calcn_r (0 0.031 -0.0053)
    Millard2012EquilibriumMuscle soleus_r: max_isometric_force=3549 optimal_fiber_length=0.05 tendon_slack_length=0.25
        pennation_angle_at_optimal=0.4363323
      PathPoint P1: tibia_r (-0.0024 -0.1533 0.0071)
      PathPoint P2: calcn_r (0 0.031 -0.0053)
    Millard2012EquilibriumMuscle tib_ant_r: max_isometric_force=1759 optimal_fiber_length=0.098
        tendon_slack_length=0.223 pennation_angle_at_optimal=0.08726646
      PathPoint P1: tibia_r (0.0179 -0.1624 0.0115)
      PathPoint P2: tibia_r (0.0329 -0.3951 -0.0177)
      PathPoint P3: calcn_r (0.1166 0.0178 -0.0305)
    Millard2012EquilibriumMuscle hamstrings_l: max_isometric_force=2594 optimal_fiber_length=0.109
        tendon_slack_length=0.31 pennation_angle_at_optimal=0
      PathPoint bifemlh_l-P1: pelvis (-0.12596 -0.10257 -0.06944)
      PathPoint bifemlh_l-P2: tibia_l (-0.028 -0.02 -0.02943)
      PathPoint bifemlh_l-P3: tibia_l (-0.021 -0.04 -0.0343)
    Millard2012EquilibriumMuscle bifemsh_l: max_isometric_force=804 optimal_fiber_length=0.173
        tendon_slack_length=0.071 pennation_angle_at_optimal=0.4014257
      PathPoint P1: femur_l (0.005 -0.2111 -0.0234)
      PathPoint P2: tibia_l (-0.028 -0.02 -0.02943)
      PathPoint P3: tibia_l (-0.021 -0.04 -0.0343)
    Millard2012EquilibriumMuscle glut_max_l: max_isometric_force=1944 optimal_fiber_length=0.147
        tendon_slack_length=0.127 pennation_angle_at_optimal=0
      PathPoint glut_max2_l-P1: pelvis (-0.1349 0.0176 -0.0563)
      PathPoint glut_max2_l-P2: pelvis (-0.1376 -0.052 -0.0914)
      PathPoint glut_max2_l-P3: femur_l (-0.0426 -0.053 -0.0293)
      PathPoint glut_max2_l-P4: femur_l (-0.0156 -0.1016 -0.0419)
    Millard2012EquilibriumMuscle iliopsoas_l: max_isometric_force=2342 optimal_fiber_length=0.1
        tendon_slack_length=0.163 pennation_angle_at_optimal=0.1396263
      PathPoint psoas_l-P1: pelvis (-0.0647 0.0887 -0.0289)
      PathPoint psoas_l-P2: pelvis (-0.03 -0.01 -0.076)
      PathPoint psoas_l-P4: femur_l (0.033 -0.035 -0.0038)
      PathPoint psoas_l-P5: femur_l (-0.0188 -0.0597 -0.0104)
    Millard2012EquilibriumMuscle rect_fem_l: max_isometric_force=1169 optimal_fiber_length=0.114
        tendon_slack_length=0.305 pennation_angle_at_optimal=0.08726646
      PathPoint P1: pelvis (-0.0295 -0.0311 -0.0968)
      PathPoint P2: tibia_l (0.04 0.025 -0.0018)
    Millard2012EquilibriumMuscle vasti_l: max_isometric_force=4530 optimal_fiber_length=0.087 tendon_slack_length=0.136
        pennation_angle_at_optimal=0.05235988
      PathPoint vas_int_l-P1: femur_l (0.029 -0.1924 -0.031)
      PathPoint vas_int_l-P2: femur_l (0.0335 -0.2084 -0.0285)
      PathPoint default: tibia_l (0.04 0.025 -0.0018)
    Millard2012EquilibriumMuscle gastroc_l: max_isometric_force=2241 optimal_fiber_length=0.06 tendon_slack_length=0.39
        pennation_angle_at_optimal=0.296706
      PathPoint med_gas_l-P1: femur_l (-0.02 -0.386 0.024)
      PathPoint med_gas_l-P3: calcn_l (0 0.031 0.0053)
    Millard2012EquilibriumMuscle soleus_l: max_isometric_force=3549 optimal_fiber_length=0.05 tendon_slack_length=0.25
        pennation_angle_at_optimal=0.4363323
      PathPoint P1: tibia_l (-0.0024 -0.1533 -0.0071)
      PathPoint P2: calcn_l (0 0.031 0.0053)
    Millard2012EquilibriumMuscle tib_ant_l: max_isometric_force=1759 optimal_fiber_length=0.098
        tendon_slack_length=0.223 pennation_angle_at_optimal=0.08726646
      PathPoint P1: tibia_l (0.0179 -0.1624 -0.0115)
      PathPoint P2: tibia_l (0.0329 -0.3951 0.0177)
      PathPoint P3: calcn_l (0.1166 0.0178 0.0305)
    HuntCrossleyForce foot_r: transition_velocity=0.15
      ContactParametersSet contact_parameters:
        ContactParameters: geometry=(platform r_heel r_toe) stiffness=2000000 dissipation=1 static_friction=0.9
            dynamic_friction=0.6 viscous_friction=0.6
    HuntCrossleyForce foot_l: transition_velocity=0.15
      ContactParametersSet contact_parameters:
        ContactParameters: geometry=(platform l_heel l_toe) stiffness=2000000 dissipation=1 static_friction=0.9
            dynamic_friction=0.6 viscous_friction=0.6
    CoordinateLimitForce KneeLimit_r: coordinate=knee_angle_r upper_stiffness=2 [N*m/degree] upper_limit=-5 [degrees]
        lower_stiffness=2 [N*m/degree] lower_limit=-120 [degrees] damping=0.2 transition=0.01 [degrees]
    CoordinateLimitForce KneeLimit_l: coordinate=knee_angle_l upper_stiffness=2 upper_limit=-5 lower_stiffness=2
        lower_limit=-120 damping=0.2 transition=0.01
    HuntCrossleyForce TripOrbCollision:
      ContactParametersSet contact_parameters:
        ContactParameters: geometry=(TripOrb r_heel r_toe) stiffness=100000000 dissipation=0.5 static_friction=0.9
            dynamic_friction=0.9 viscous_friction=0.6
  ContactGeometrySet:
    ContactHalfSpace platform: socket_frame=/ground location=(0 0 0) orientation=(0 0 -1.570796)
    ContactSphere r_heel: socket_frame=/bodyset/calcn_r location=(0.015 0.015 -0.005) radius=0.03
    ContactSphere r_toe: socket_frame=/bodyset/calcn_r location=(0.185 0.015 0) radius=0.03
    ContactSphere l_heel: socket_frame=/bodyset/calcn_l location=(0.015 0.015 0.005) radius=0.03
    ContactSphere l_toe: socket_frame=/bodyset/calcn_l location=(0.185 0.015 0) radius=0.03
    ContactSphere TripOrb: socket_frame=/ground location=(70 0 0.09959912) radius=0.1
